f(x) := x^6 + x^2 - 5.8
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ε := 0.0005
a := 1.1
b := 1.4
def_1(x) := d/dx(f(x))
def_1(x) → 6*x^5 + 2*x → 6*x^5 + 2*x  # 1 производная по x
def_2(x) := d/dx(def_1(x))
# 2 производная по x
def_2(x) → 30*x^4 + 2
# Находим начальное приближение
f(a)*def_2(a) = -129.431
f(b)*def_2(b) = 432.591
x0 := a
# Значит точка a начальное приближение
# 1 итерация
x1 := x0 - f(x0)/def_1(x0) = 1.33758
|x1 - x0| = 0.237581
f(x1) = 1.71604
# 2 итерация
x0 := x1 = 1.33758
x1 := x0 - f(x0)/def_1(x0) = 1.27708
|x1 - x0| = 0.0604996
f(x1) = 0.169157
# 3 итерация
x0 := x1 = 1.27708
x1 := x0 - f(x0)/def_1(x0) = 1.26971
|x1 - x0| = 0.00737518
f(x1) = 0.00220801
# 4 итерация
x0 := x1 = 1.26971
x1 := x0 - f(x0)/def_1(x0) = 1.26961
|x1 - x0| = 9.88387e-5
f(x1) = 3.90584e-7
x1 = 1.26961
f(x1) = 3.90584e-7
