f(x) := x^6 + x^2 - 5.8
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ε := 0.0005
a := 1.1
b := 1.4
f(a)*f(b) = -10.3987
# Находим начальные приближения
x0 := a
x1 := x0 + ε = 1.1005
# 1 итерация
x2 := x1 - (x1 - x0)*f(x1)/(f(x1) - f(x0)) = 1.33735
f(x2) = 1.70952
# 2 итерация
x0 := x1 = 1.1005
x1 := x2 = 1.33735
x2 := x1 - (x1 - x0)*f(x1)/(f(x1) - f(x0)) = 1.24781
f(x2) = -0.468174
# 3 итерация
x0 := x1 = 1.33735
x1 := x2 = 1.24781
x2 := x1 - (x1 - x0)*f(x1)/(f(x1) - f(x0)) = 1.26706
f(x2) = -0.0566069
# 4 итерация
x0 := x1 = 1.24781
x1 := x2 = 1.26706
x2 := x1 - (x1 - x0)*f(x1)/(f(x1) - f(x0)) = 1.26971
f(x2) = 0.00226073
# 4 итерация
x0 := x1 = 1.26706
x1 := x2 = 1.26971
x2 := x1 - (x1 - x0)*f(x1)/(f(x1) - f(x0)) = 1.26961
f(x2) = -1.0322e-5
