ε := 0, 005  # требуемая точнсть вычеслений
x1 := 0  # начальные значения
x2 := 0
x3 := 0
x4 := 0
# Итерация 1
xx1 := -0.15/8*x2 + 0.2/8*x3 + (-0.14/8*x4) - 15/8
xx2 := -0.14/9*x1 + (-0.12/9*x3) + 0.11/9*x4 + 16/9
xx3 := -0.1/4*x1 + 0.19/4*x2 + (-0.17/4*x4) + 16/4
xx4 := -0.15/9*x1 + (-0.19/9*x2) + (-0.11/9*x4) + (-18/9)
xx1 = -1.875
xx2 = 1.77778
xx3 = 4
xx4 = -2
# проверка точности решения
|xx1 - x1| = 1.875
|xx2 - x2| = 1.77778
|xx3 - x3| = 4
|xx4 - x4| = 2
# максимальная разность < ε
max := |xx3 - x3| = 4
# Итерация 2
x1 := xx1 = -1.875
x2 := xx2 = 1.77778
x3 := xx3 = 4
x4 := xx4 = -2
xx1 := -0.15/8*x2 + 0.2/8*x3 + (-0.14/8*x4) - 15/8
xx2 := -0.14/9*x1 + (-0.12/9*x3) + 0.11/9*x4 + 16/9
xx3 := -0.1/4*x1 + 0.19/4*x2 + (-0.17/4*x4) + 16/4
xx4 := -0.15/9*x1 + (-0.19/9*x2) + (-0.11/9*x4) + (-18/9)
xx1 = -1.77333
xx2 = 1.72917
xx3 = 4.21632
xx4 = -1.98184
# проверка точности решения
|xx1 - x1| = 0.101667
|xx2 - x2| = 0.0486111
|xx3 - x3| = 0.216319
|xx4 - x4| = 0.0181636
# максимальная разность < ε
max := |xx3 - x3| = 0.216319
# Итерация 3
C
x1 := xx1 = -1.77333
x2 := xx2 = 1.72917
x3 := xx3 = 4.21632
x4 := xx4 = -1.98184
xx1 := -0.15/8*x2 + 0.2/8*x3 + (-0.14/8*x4) - 15/8
xx2 := -0.14/9*x1 + (-0.12/9*x3) + 0.11/9*x4 + 16/9
xx3 := -0.1/4*x1 + 0.19/4*x2 + (-0.17/4*x4) + 16/4
xx4 := -0.15/9*x1 + (-0.19/9*x2) + (-0.11/9*x4) + (-18/9)
xx1 = -1.76733
xx2 = 1.72492
xx3 = 4.2107
xx4 = -1.98273
# проверка точности решения
|xx1 - x1| = 0.00600158
|xx2 - x2| = 0.00424374
|xx3 - x3| = 0.00562265
|xx4 - x4| = 0.000890209
# максимальная разность < ε
max := |xx1 - x1| = 0.00600158
# Итерация 3
C
x1 := xx1 = -1.76733
x2 := xx2 = 1.72492
x3 := xx3 = 4.2107
x4 := xx4 = -1.98273
xx1 := -0.15/8*x2 + 0.2/8*x3 + (-0.14/8*x4) - 15/8
xx2 := -0.14/9*x1 + (-0.12/9*x3) + 0.11/9*x4 + 16/9
xx3 := -0.1/4*x1 + 0.19/4*x2 + (-0.17/4*x4) + 16/4
xx4 := -0.15/9*x1 + (-0.19/9*x2) + (-0.11/9*x4) + (-18/9)
xx1 = -1.76738
xx2 = 1.72489
xx3 = 4.21038
xx4 = -1.98273
# проверка точности решения
|xx1 - x1| = 4.54174e-5
|xx2 - x2| = 2.92697e-5
|xx3 - x3| = 0.000313783
|xx4 - x4| = 4.44068e-7
# максимальная разность < ε
max := |xx1 - x1| = 4.54174e-5
# достигли заданную точность xx
#
# ответ
