data := [4.98, 8.47; 3.42, 5.46; 5.80, 6.45; 1.13, 4.23; 6.53, 3.75]
X := [4.98; 3.42; 5.80; 4.98; 6.53]
Y := [8.47; 5.46; 6.45; 4.23; 3.75]
data := csort(data, 0) = [1.13, 4.23; 3.42, 5.46; 4.98, 8.47; 5.8, 6.45; 6.53, 3.75]
X := data[:, 0] = [1.13; 3.42; 4.98; 5.8; 6.53]
Y := data[:, 1] = [4.23; 5.46; 8.47; 6.45; 3.75]
S := cspline(X, Y) = [0; 3; 2; 7.51304; -0.0839393; -5.25917; -1.45464; 1.93233]
f(x)*interp(S, X, Y, x)
(4.98 - (8.47*a + b))^2 + (3.42 - (5.46*a + b))^2 + (5.80 - (6.45*a + b))^2 + (1.13 - (4.23*a + b))^2 + (6.53 - (3.75*a + b))^2 expand → -255.0624*a + (-43.72*b) + 175.1104*a^2 + 5*b^2 + 56.72*a*b + 114.0546
-255.0624*a + (-43.72*b) + 175.1104*a^2 + 5*b^2 + 56.72*a*b + 114.0546
a := 1
b := 1
Given
350.2208*a + 56.72*b - 255.0624 == 0
56.72*a + 10*b - 43.72 == 0
Find(a, b) = [0.248468; 2.96269]
f(x) := 0.248*x + 2.963
x1 := 4.98
f1(x1) := 8.47
x2 := 3.42
f2(x2) := 5.46
x3 := 5.80
f3(x3) := 6.45
x4 := 1.13
f4(x4) := 4.23
x5 := 6.53
f5(x5) := 3.75
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