(4.98 - (8.47^2*a + 8.47*b + c))^2 + (3.42 - (5.46^2*a + 5.46*b + c))^2 + (5.80 - (6.45^2*a + 6.45*b + c))^2 + (1.13 - (4.23^2*a + 4.23*b + c))^2 + (6.53 - (3.75^2*a + 3.75*b + c))^2 expand → -1625.133912*a + (-255.0624*b) + (-43.72*c) + 8284.16601028*a^2 + 175.1104*b^2 + 5*c^2 + 2334.348452*a*b + 350.2208*a*c + 56.72*b*c + 114.0546
-1625.133912*a + (-255.0624*b) + (-43.72*c) + 8284.16601028*a^2 + 175.1104*b^2 + 5*c^2 + 2334.348452*a*b + 350.2208*a*c + 56.72*b*c + 114.0546
a := 1
b := 1
c := 1
Given
350.2208*a + 56.72*b + 10*c - 43.72 == 0
2334.348452*a + 350.2208*b + 56.72*c - 255.0624 == 0
16568.3320206*a + 2334.348452*b + 350.2208*c - 1625.133912 == 0
Find(a, b, c) = [0.132332; -1.36662; 7.48889]
x1 := 4.98
f1(x1) := 8.47
x2 := 3.42
f2(x2) := 5.46
x3 := 5.80
f3(x3) := 6.45
x4 := 1.13
f4(x4) := 4.23
x5 := 6.53
f5(x5) := 3.75
f(x) := 0.132*x^2 + (-1.367*x) + 7.489
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