# начальная точка
x0 := 0.6
y0 := 2.3
h := 0.1
# находим производную
f(x0, y0) := x0 - 2 + y0
f(0.6, 2.3) = 0.9
# по офрмуле Эйлера
y1 := y0 + h*f(x0, y0)
y1 = 2.39
# новая точка x
x1 := x0 + h
x1 = 0.7
получили
x1 = 0.7
y1 = 2.39
# шаг 1
# находим производную
f(x1, y1) := x1 - 2 + y1
f(x1, y1) = 1.09
# по офрмуле Эйлера
y2 := y1 + h*f(x1, y1)
y2 = 2.499
# новая точка x
x2 := x1 + h
x2 = 0.8
получили
x2 = 0.8
y2 = 2.499
# шаг 2
# находим производную
f(x2, y2) := x2 - 2 + y2
f(x2, y2) = 1.299
# по офрмуле Эйлера
y3 := y2 + h*f(x2, y2)
y3 = 2.6289
# новая точка x
x3 := x2 + h
x3 = 0.9
получили
x3 = 0.9
y3 = 2.6289
# шаг 3
# находим производную
f(x3, y3) := x3 - 2 + y3
f(x3, y3) = 1.5289
# по офрмуле Эйлера
y4 := y3 + h*f(x3, y3)
y4 = 2.78179
# новая точка x
x4 := x3 + h
x4 = 1
получили
x4 = 1
y4 = 2.78179
# шаг 4
# находим производную
f(x4, y4) := x4 - 2 + y4
f(x4, y4) = 1.78179
# по офрмуле Эйлера
y5 := y4 + h*f(x4, y4)
y5 = 2.95997
# новая точка x
x5 := x4 + h
x5 = 1.1
получили
x5 = 1.1
y5 = 2.95997
# шаг 5
# находим производную
f(x5, y5) := x5 - 2 + y5
f(x5, y5) = 2.05997
# по офрмуле Эйлера
y6 := y5 + h*f(x5, y5)
y6 = 3.16597
# новая точка x
x6 := x5 + h
x6 = 1.2
получили
x6 = 1.2
y6 = 3.16597
# шаг 6
# находим производную
f(x6, y6) := x6 - 2 + y6
f(x6, y6) = 2.36597
# по офрмуле Эйлера
y7 := y6 + h*f(x6, y6)
y7 = 3.40256
# новая точка x
x7 := x6 + h
x7 = 1.3
получили
x7 = 1.3
y7 = 3.40256
# шаг 7
# находим производную
f(x7, y7) := x7 - 2 + y7
f(x7, y7) = 2.70256
# по офрмуле Эйлера
y8 := y7 + h*f(x7, y7)
y8 = 3.67282
# новая точка x
x8 := x7 + h
x8 = 1.4
получили
x8 = 1.4
y8 = 3.67282
# шаг 8
# находим производную
f(x8, y8) := x8 - 2 + y8
f(x8, y8) = 3.07282
# по офрмуле Эйлера
y9 := y8 + h*f(x8, y8)
y9 = 3.9801
# новая точка x
x9 := x8 + h
x9 = 1.5
получили
x9 = 1.5
y9 = 3.9801
# шаг 9
# находим производную
f(x9, y9) := x9 - 2 + y9
f(x9, y9) = 3.4801
# по офрмуле Эйлера
y10 := y9 + h*f(x9, y9)
y10 = 4.32811
# новая точка x
x10 := x9 + h
x10 = 1.6
получили
x10 = 1.6
y10 = 4.32811
