# Исходные данные
f(x, y) := x - 2 + y
h := 0.1
# Шаг 0. начальная точка
x[0] := 0.6 = 0.6
y[0] := 2.3
# Шаг 1. Первая точка
x[1] := x[0] + h = 0.7
y[1] := y[0] + h*f(x[0], y[0]) = 2.39
# Шаг 2. Вторая точка
x[2] := x[1] + h = 0.8
y[2] := y[1] + h*f(x[1], y[1]) = 2.499
# Шаг 3. Третья точка
x[3] := x[2] + h = 0.9
y[3] := y[2] + h*f(x[2], y[2]) = 2.6289
# Шаг 4. Четвертая точка
x[4] := x[3] + h = 1
y[4] := y[3] + h*f(x[3], y[3]) = 2.78179
# Шаг 5. Пятая точка
x[5] := x[4] + h = 1.1
y[5] := y[4] + h*f(x[4], y[4]) = 2.95997
# Шаг 6. Шестая точка
x[6] := x[5] + h = 1.2
y[6] := y[5] + h*f(x[5], y[5]) = 3.16597  # Шаг 7. Седьма точка
x[7] := x[6] + h = 1.3
y[7] := y[6] + h*f(x[6], y[6]) = 3.40256
# Шаг 8. Восьмая точка
x[8] := x[7] + h = 1.4
y[8] := y[7] + h*f(x[7], y[7]) = 3.67282
# Шаг 9. Девятая точка
x[9] := x[8] + h = 1.5
y[9] := y[8] + h*f(x[8], y[8]) = 3.9801
# Шаг 10. Десятая точка
x[10] := x[9] + h = 1.6
y[10] := y[9] + h*f(x[9], y[9]) = 4.32811
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