f(x) := x^6 + x^2 - 5.8
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# 1 итерация
a := 1  # начало и конец отрезка на котором ищетсся корень
b := 1.5
ε := 0.0005
f(a)*f(b) = -29.7944  # проверка есть ли корень на отрезке a b
c := (a + b)/2  # приближенное значение корня
f(a)*f(c) = 1.60665  # проверка есть ли корень на отрезке a c
f(c)*f(b) = -3.31504  # проверка есть ли корень на отрезке с b
|b - a| = 0.5  # условие прекращения итераций не соблюдено
2*ε = 0.001
f(c) = -0.422803
# 2 итерация
a := c
b = 1.5
c := (a + b)/2
f(a)*f(c) = -1.20439
|b - a| = 0.25
f(c) = 2.84859
# 3 итерация
a = 1.25
b := c
c := (a + b)/2
f(a)*f(c) = -0.437481
f(c)*f(b) = 2.94748
|b - a| = 0.125
f(c) = 1.03472
# 4 итерация
a = 1.25
b := c
c := (a + b)/2
f(a)*f(c) = -0.112246
f(c)*f(b) = 0.274697
|b - a| = 0.0625
f(c) = 0.265481
# 5 итерация
5
a = 1.25
b := c
c := (a + b)/2
f(a)*f(c) = 0.0373346
f(c)*f(b) = -0.0234427
|b - a| = 0.03125
f(c) = -0.0883027
# 6 итерация
a := c
b := 1.281
c := (a + b)/2
f(a)*f(c) = -0.00735482
f(c)*f(b) = 0.0216277
|b - a| = 0.015375
f(c) = 0.0832911
# 7 итерация
a := 1.265
b := c
c := (a + b)/2
f(a)*f(c) = 0.00102735
f(c)*f(b) = -0.000838526
|b - a| = 0.0083125
f(c) = -0.0100674
# 8 итерация
a := c
b := 1.273
c := (a + b)/2
f(a)*f(c) = -0.000331516
f(c)*f(b) = 0.00251
|b - a| = 0.00384375
f(c) = 0.0329296
# 9 | 9 итерация
a := 1.269
b := c
c := (a + b)/2
f(a)*f(c) = -0.000130712
f(c)*f(b) = 0.000317657
|b - a| = 0.00207812
f(c) = 0.00964653
# 10 итерация
a := 1.269
b := c
c := (a + b)/2
f(a)*f(c) = 2.65933e-5
f(c)*f(b) = -1.89321e-5
|b - a| = 0.00103906
f(c) = -0.00196258
# 11 итерация
a := c
b := 1.27
c := (a + b)/2
f(a)*f(c) = -6.67839e-6
f(c)*f(b) = 2.9853e-5
|b - a| = 0.000480469
c = 1.26976
f(c) = 0.00340286
# 12 итерация
a = 1.26952
b := c
c := (a + b)/2
f(a)*f(c) = -1.4122e-6
f(c)*f(b) = 2.44856e-6
|b - a| = 0.000240234
c = 1.26964
f(c) = 0.00071956
# 13 итерация
a = 1.26952
b := c
c := (a + b)/2
f(a)*f(c) = 1.22005e-6
f(c)*f(b) = -4.47319e-7
|b - a| = 0.000120117
c = 1.26958
f(c) = -0.000621656
# 14 итерация
a := c
b = 1.26964
c := (a + b)/2
f(a)*f(c) = -3.04088e-8
f(c)*f(b) = 3.51979e-8
|b - a| = 6.00586e-5
c = 1.26961
f(c) = 4.89158e-5
