X := [-7.75, 1.81, 11.37, 20.93, 30.49]
Y := [-7.26, -1.77, 1.43, -7.29, 5.62]
x0 := -7.75
y0 := -7.26
x1 := 1.81
y1 := -1.77
x2 := 11.37
y2 := 1.43
x3 := 20.93
y3 := -7.29
x4 := 30.49
y4 := 5.62
# слогаемые в многочление Лангранжа
l0(x) := y0*(x - x1)*(x - x2)*(x - x3)*(x - x4)/((x0 - x1)*(x0 - x2)*(x0 - x3)*(x0 - x4))
l1(x) := □  # error: Пустой местозаполнитель.
l1(x) := y1*(x - x0)*(x - x2)*(x - x3)*(x - x4)/((x1 - x0)*(x1 - x2)*(x1 - x3)*(x1 - x4))
l2(x) := y2*(x - x0)*(x - x1)*(x - x3)*(x - x4)/((x2 - x0)*(x2 - x1)*(x2 - x3)*(x2 - x4))
l3(x) := y3*(x - x0)*(x - x1)*(x - x2)*(x - x4)/((x3 - x0)*(x3 - x1)*(x3 - x2)*(x3 - x4))
l4(x) := y4*(x - x0)*(x - x1)*(x - x2)*(x - x3)/((x4 - x0)*(x4 - x1)*(x4 - x2)*(x4 - x3))
# итерполяционный многочлен Лонгранжа
Ln(x) := l0(x) + l1(x) + l2(x) + l3(x) + l4(x)
a := 9.56
l0(a) = 0.120894
l1(a) = -0.263327
l2(a) = 1.36638
l3(a) = 0.73925
l4(a) = 0.0773983
Ln(a) = 2.0406
y(x) := Ln(x)
x := -8, -7 .. 30
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x0 := -7.75
y0 := -1.26
x1 := 1.81
y1 := -1.77
x2 := 11.27
y2 := 1.43
x3 := 20.93
y3 := -7.29
x4 := 30.19
y4 := -5.62
Ln(x0) = -7.26
Ln(x1) = -1.77
Ln(x2) = 1.47887
Ln(x3) = -7.29
Ln(x4) = 4.23195
