X := [-7.75, 1.81, 11.37, 20.93, 30.49]
Y := [-7.26, -1.77, 1.43, -7.29, 5.62]
y0 := -7.26
x0 := -7.75
y1 := -1.77
x1 := 1.81
y2 := 1.43
x2 := 11.37
y3 := -7.29
x3 := 20.93
y4 := 5.62
x4 := 30.49
# шаг h
h1 := x1 - x0 = 9.56
h2 := x2 - x1 = 9.56
h3 := x2 - x1 = 9.56
h4 := x3 - x2 = 9.56
h := x1 - x0 = 9.56
# конечная разность первого порядка
Δy0 := y1 - y0 = 5.49
Δy1 := y2 - y1 = 3.2
Δy2 := y3 - y2 = -8.72
Δy3 := y4 - y3 = 12.91
# конечная разность 2 порядка
Δ2y0 := Δy1 - Δy0 = -2.29
Δ2y1 := Δy2 - Δy1 = -11.92
Δ2y2 := Δy3 - Δy2 = 21.63
# конечная разность 3 порядка
Δ3y0 := Δ2y1 - Δ2y0 = -9.63
Δ3y1 := Δ2y2 - Δ2y1 = 33.55
# конечная разность 4 порядка
Δ4y0 := Δ3y1 - Δ3y0 = 43.18
# первая интерполяционная формулы Ньютона
a := 9.56
|a - x0| = 17.31  # растояние до точки x0
Pn(x) := y0 + Δy0*(x - x0)/(1!*h) + Δ2y0*(x - x0)*(x - x1)/(2!*h^2) + Δ3y0*(x - x0)*(x - x1)*(x - x2)/(3!*h^3) + Δ4y0*(x - x0)*(x - x1)*(x - x2)*(x - x3)/(4!*h^4)
Pn(a) = 2.0406
|a - x4| = 20.93  # растояние до точки x4
# вторая интерполяционная формулы Ньютона применяеться когда ископмая точка ближе к x4
V(x) := (x - x0)/h
Pn2(x) := y0 + V(x)*Δy0 + V(x)*(V(x) - 1)*Δ2y0/2! + V(x)*(V(x) - 1)*(V(x) - 2)*Δ3y0/3! + V(x)*(V(x) - 1)*(V(x) - 2)*(V(x) - 3)*Δ4y0/4!
Pn2(a) = 2.0406
