ε := 0, 005  # требуемая точнсть вычеслений
# метод сходится если выполняеться условие в каждой строчке модуль кф на главной диагонали больше сумму модулей остальных кф в строке свободный член не учитывается
# в первой строчке это условие нарушается |8| < |15| + |-2| + |14|
# во втрой строчке тоже условие нарушается |-9| < |-14| + |-12| + |11|
#
# поэтому решать данным методлм нельзя метод расходися
x1 := 0  # начальные значения
x2 := 0
x3 := 0
x4 := 0
# Итерация 1
xx1 := -15/8*x2 + 2/8*x3 + (-14/8*x4) - 15/8
xx2 := -14/9*x1 + (-12/9*x3) + 11/9*x4 + 16/9
xx3 := -1/4*x1 + 19/4*x2 + (-17/4*x4) + 16/4
xx4 := -15/9*x1 + (-19/9*x2) + (-11/9*x4) + (-18/9)
xx1 = -1.875
xx2 = 1.77778
xx3 = 4
xx4 = -2
# проверка точности решения
|xx1 - x1| = 1.875
|xx2 - x2| = 1.77778
|xx3 - x3| = 4
|xx4 - x4| = 2
# максимальная разность < ε
max := |xx3 - x3| = 4
# Итерация 2
x1 := xx1 = -1.875
x2 := xx2 = 1.77778
x3 := xx3 = 4
x4 := xx4 = -2
xx1 := -15/8*x2 + 2/8*x3 + (-14/8*x4) - 15/8
xx2 := -14/9*x1 + (-12/9*x3) + 11/9*x4 + 16/9
xx3 := -1/4*x1 + 19/4*x2 + (-17/4*x4) + 16/4
xx4 := -15/9*x1 + (-19/9*x2) + (-11/9*x4) + (-18/9)
xx1 = -0.708333
xx2 = -3.08333
xx3 = 21.4132
xx4 = -0.183642
# проверка точности решения
|xx1 - x1| = 1.16667
|xx2 - x2| = 4.86111
|xx3 - x3| = 17.4132
|xx4 - x4| = 1.81636
# максимальная разность < ε
max := |xx3 - x3| = 17.4132
# Итерация 3
x1 := xx1 = -0.708333
x2 := xx2 = -3.08333
x3 := xx3 = 21.4132
x4 := xx4 = -0.183642
xx1 := -15/8*x2 + 2/8*x3 + (-14/8*x4) - 15/8
xx2 := -14/9*x1 + (-12/9*x3) + 11/9*x4 + 16/9
xx3 := -1/4*x1 + 19/4*x2 + (-17/4*x4) + 16/4
xx4 := -15/9*x1 + (-19/9*x2) + (-11/9*x4) + (-18/9)
xx1 = 9.58092
xx2 = -25.8957
xx3 = -9.68827
xx4 = 5.91427
# проверка точности решения
|xx1 - x1| = 10.2893
|xx2 - x2| = 22.8124
|xx3 - x3| = 31.1015
|xx4 - x4| = 6.09791
# максимальная разность < ε
max := |xx3 - x3| = 31.1015
