A := [8, 15, -2, 14; -14, -9, -12, 11; 1, -19, 4, 17; -15, -19, -11, -9]
B := [-15; -16; 16; 18]
# приводим систему уравнений к диагональному преобладанию
E := [
    0.001, 0.001, 0.001, 0.001;
    0.001, 0.001, 0.001, 0.001;
    0.001, 0.001, 0.001, 0.001;
    0.001, 0.001, 0.001, 0.001
]
AA := A^-1 = [
    0.138355, -0.130076, 0.039671, 0.131171;
    -0.0247293, 0.0428497, -0.0368155, -0.0556364;
    -0.144497, 0.0717275, -0.00378931, -0.144263;
    -0.00177792, 0.0386653, 0.0162348, -0.0359535
]
D := A^-1 - E = [
    0.137355, -0.131076, 0.038671, 0.130171;
    -0.0257293, 0.0418497, -0.0378155, -0.0566364;
    -0.145497, 0.0707275, -0.00478931, -0.145263;
    -0.00277792, 0.0376653, 0.0152348, -0.0369535
]
α := E*A = [
    -0.02, -0.032, -0.021, 0.033;
    -0.02, -0.032, -0.021, 0.033;
    -0.02, -0.032, -0.021, 0.033;
    -0.02, -0.032, -0.021, 0.033
]
β := D*B = [2.99871; -1.90816; -1.64056; -0.982383]
ε := 0.005
# начальное приближение к решению системы уравнений
X := [0; 0; 0; 0]
# 1 Итерация
XX := α*X + β = [2.99871; -1.90816; -1.64056; -0.982383]
# проверка окончания итераций
XX - X = [2.99871; -1.90816; -1.64056; -0.982383]
# точность не достигнута так как максимальный модуль разности больше
# 2 Итерация
X := XX = [2.99871; -1.90816; -1.64056; -0.982383]
XX := α*X + β = [3.00183; -1.90504; -1.63744; -0.979263]
# проверка окончания итераций
XX - X = [0.00312; 0.00312; 0.00312; 0.00312]
# точность достигнута так как максимальный модуль разности больше
# Ответ
XX = [3.00183; -1.90504; -1.63744; -0.979263]
проверка
A*XX = [-14.9958; -16.0029; 16.0004; 17.9935]
B = [-15; -16; 16; 18]
