# Исходные данные
f(x, y, z) := -x + y + z  # сделали замену z=y'
h := 0.25
# Шаг 0. Начальные данные
x[0] := 0.6
y[0] := 2.3
z[0] := 2
# Шаг 1.
# ищем кф k и l
k1 := h*z[0] = 0.5
l1 := h*f(x[0], y[0], z[0]) = 0.925
k2 := h*(z[0] + l1/2) = 0.615625
l2 := h*f(x[0] + h/2, y[0] + k1/2, z[0] + l1/2) = 1.07187
k3 := h*(z[0] + l2/2) = 0.633984
l3 := h*f(x[0] + h/2, y[0] + k2/2, z[0] + l2/2) = 1.10469
k4 := h*(z[0] + l3) = 0.776172
l4 := h*f(x[0] + h, y[0] + k3, z[0] + l3) = 1.29717
# ищем приращения
Δy[0] := 1/6*(k1 + 2*k2 + 2*k3 + k4) = 0.629232
Δz[0] := 1/6*(l1 + 2*l2 + 2*l3 + l4) = 1.09588
# ищем новые значения x y z
y[1] := y[0] + Δy[0] = 2.92923
z[1] := z[0] + Δz[0] = 3.09588
x[1] := x[0] + h = 0.85
# шаг 2
k1 := h*z[1] = 0.773971
l1 := h*f(x[1], y[1], z[1]) = 1.29378
k2 := h*(1 + l1/2) = 0.411722
l2 := h*f(x[1] + h/2, y[1] + k1/2, z[1] + l1/2) = 1.521
k3 := h*(z[1] + l2/2) = 0.964095
l3 := h*f(x[1] + h/2, y[1] + k2/2, z[1] + l2/2) = 1.50412
k4 := h*(z[1] + l3) = 1.15
l4 := h*f(x[1] + h, y[1] + k3, z[1] + l3) = 1.84833
# ищем приращения
Δy[1] := 1/6*(k1 + 2*k2 + 2*k3 + k4) = 0.779268
Δz[1] := 1/6*(l1 + 2*l2 + 2*l3 + l4) = 1.53206
# ищем новые значения x y z
y[2] := y[1] + Δy[1] = 3.7085
z[2] := z[1] + Δz[1] = 4.62794
x[2] := x[1] + h = 1.1
# шаг 3
k1 := h*z[2] = 1.15698
l1 := h*f(x[2], y[2], z[2]) = 1.80911
k2 := h*(1 + l1/2) = 0.476139
l2 := h*f(x[2] + h/2, y[2] + k1/2, z[2] + l1/2) = 2.14862
k3 := h*(z[2] + l2/2) = 1.42556
l3 := h*f(x[2] + h/2, y[2] + k2/2, z[2] + l2/2) = 2.10595
k4 := h*(z[2] + l3) = 1.68347
l4 := h*f(x[2] + h, y[2] + k3, z[2] + l3) = 2.62949
# ищем приращения
Δy[2] := 1/6*(k1 + 2*k2 + 2*k3 + k4) = 1.10731
Δz[2] := 1/6*(l1 + 2*l2 + 2*l3 + l4) = 2.15796
# ищем новые значения x y z
y[3] := y[2] + Δy[2] = 4.81581
z[3] := z[2] + Δz[2] = 6.7859
x[3] := x[2] + h = 1.35
# шаг 4
k1 := h*z[3] = 1.69647
l1 := h*f(x[3], y[3], z[3]) = 2.56293
k2 := h*(1 + l1/2) = 0.570366
l2 := h*f(x[3] + h/2, y[3] + k1/2, z[3] + l1/2) = 3.0641
k3 := h*(z[3] + l2/2) = 2.07949
l3 := h*f(x[3] + h/2, y[3] + k2/2, z[3] + l2/2) = 2.98599
k4 := h*(z[3] + l3) = 2.44297
l4 := h*f(x[3] + h, y[3] + k3, z[3] + l3) = 3.76679
# ищем приращения
Δy[3] := 1/6*(k1 + 2*k2 + 2*k3 + k4) = 1.57319
Δz[3] := 1/6*(l1 + 2*l2 + 2*l3 + l4) = 3.07165
# ищем новые значения x y z
y[4] := y[3] + Δy[3] = 6.389
z[4] := z[3] + Δz[3] = 9.85755
x[4] := x[3] + h = 1.6
